import bpy
import os
import xml.etree.ElementTree as ET
from mathutils import Vector, Euler, Quaternion
from math import degrees, sqrt
from array import array
from io import StringIO
from .lua_format import *
import numpy as np
from bpy_extras.io_utils import ExportHelper
from bpy.props import StringProperty, BoolProperty, EnumProperty
from bpy.types import Operator
import math
import bmesh
import zipfile
from os.path import basename
from .io_msh import recalc_outer_surface

FILEFORMATS = [ ('.salua', 'SaLua', 'Lua based scene file'), ('.scn', 'XML', 'XML scene file') ]

class ExportException(Exception):
    def __init__(self, message):
        Exception.__init__(self, message)
        self.message = message

def ndarray_to_flat_string(a):
    b = StringIO()
    f = a.reshape(a.size)
    for i in f:
        b.write(str(i))
        b.write(' ')
    s = b.getvalue()
    b.close()
    return s

def iterable(o):
    return hasattr(o, '__getitem__') and hasattr(o, '__len__')

def vec_safe(v):
    if v.is_wrapped:
        return v.copy()
    return v

def vector_to_string(v):
    if v:
        try:
            print("vector_to_string")
            print("object type: " + str(type(v)))
            print("object length: " + str(len(v)))
            print("object: " + str(v))
            t = ""
            for i in v:
                if iterable(i):
                    v2s = vector_to_string(i)
                    if v2s != False:
                        t += vector_to_string(i) + ' '
                    else:
                        print("ACCESS ERROR: inside " + str(v))
                else:
                    t += str(i) + ' '
            return t
        except SystemError as e:
            print(e)
            return False
    return False

def stringify_etree(node):
    print("STRINGIFY")
    for a in node.attrib:
        o = node.get(a)
        if isinstance(o, str):
            pass
        elif isinstance(o, np.ndarray):
            node.set(a, ndarray_to_flat_string(o))
        elif iterable(o):
            v2s = vector_to_string(o)
            if v2s != False:
                node.set(a, vector_to_string(o))
            else:
                node.set(a, "ACCESS ERROR")
        elif isinstance(o, bool):
            node.set(a, str(int(o)))
        else:
            node.set(a, str(o))
    for c in node:
        stringify_etree(c)

def exportSeparateFile(opt, t, name):
    base = os.path.join(opt.directory, name)
    if opt.file_format == '.salua':
        r = ET.Element("require", href=name)
        writeSubTreeToLua(t, base + '.lua')
    else:
        ext = '.xml'
        r = ET.Element("include", href=name + ext)
        stringify_etree(t)
        ET.ElementTree(t).write(base + ext)
    #add to the xml files to the filepath
    opt.filepath_list.append(base+ext)
    return r

def geometryNode(opt, t):
    if opt.isolate_geometry and t.get('name') != None:
        return exportSeparateFile(opt, t, t.get('name') + "-geometry")
    else:
        return t

def rotation_to_XYZ_euler(o):
    if o.rotation_mode == 'XYZ':
        v = o.rotation_euler
    else:
        if o.rotation_mode == 'QUATERNION':
            q = o.rotation_quaternion
        else:
            q = Euler(o.rotation_euler, o.rotation_mode).to_quaternion()
        v = q.to_euler('XYZ')
    return Vector(map(degrees,v))

def rotation_to_quaternion(o):
    if o.rotation_mode == 'QUATERNION':
        q = o.rotation_quaternion
    else:
        q = Euler(o.rotation_euler, o.rotation_mode).to_quaternion()
    return Vector([q[1],q[2],q[3],q[0]])

def createMechanicalObject(o):
    t = ET.Element("MechanicalObject",template="Vec3d",name="MO")
    t.set("translation", o.location)
    t.set("rotation", rotation_to_XYZ_euler(o))
    t.set("scale3d", o.scale)
    return t

def addSolvers(t):
    if bpy.context.scene.precompution:
        t.append(ET.Element("EulerImplicitSolver", rayleighMass="0.1", rayleighStiffness="0.1"))
        t.append(ET.Element("CGLinearSolver",iterations="100", tolerance="1.0e-10", threshold="1.0e-6"))
    else:
        if bpy.context.scene.use_gravity :
            t.append(ET.Element("Gravity", gravity=bpy.context.scene.gravity))
        t.append(ET.Element("EulerImplicitSolver", rayleighMass="0.05", rayleighStiffness="0.0"))
        t.append(ET.Element("CGLinearSolver",iterations="50", tolerance="1.0e-10", threshold="1.0e-6"))

def convertHexTo5Tets(o):
    if o.type == 'MESH' and hasattr(o.data,'hexahedra') and len(o.data.hexahedra) > 0:
        mesh = o.data
    else:
        raise ExportException("While processing %s: hexahedral mesh expected!" % o.name)
    if len(o.data.tetrahedra) > 0:
        o.data.tetrahedra.clear()
    for hex in mesh.hexahedra:
        v = hex.vertices
        tet1 = mesh.tetrahedra.add()
        tet1.vertices = [v[0], v[1], v[3], v[4]]
        tet2 = mesh.tetrahedra.add()
        tet2.vertices = [v[1], v[4], v[5], v[6]]
        tet3 = mesh.tetrahedra.add()
        tet3.vertices = [v[1], v[2], v[3], v[6]]
        tet4 = mesh.tetrahedra.add()
        tet4.vertices = [v[3], v[4], v[6], v[7]]
        tet5 = mesh.tetrahedra.add()
        tet5.vertices = [v[1], v[3], v[4], v[6]]
    mesh.hexahedra.clear()
    recalc_outer_surface(mesh)
    # recalculate normals, all should point outside
    #bpy.ops.object.select_all(action='DESELECT')
    o.select = True
    bpy.context.scene.objects.active = o
    #bpy.ops.object.mode_set(mode='EDIT')
    #bpy.ops.mesh.select_all(action='SELECT')
    #bpy.ops.mesh.normals_make_consistent(inside=False)
    #bpy.ops.object.editmode_toggle()

    mesh.update()
    print("finished converting to tetrahedral mesh, # of elements: %s" %len(o.data.tetrahedra))
    return 0


def exportTetrahedralTopology(o, opt, name):
    if o.type == 'MESH' and hasattr(o.data,'tetrahedra') and len(o.data.tetrahedra) > 0:
        m = o.data
    else:
        raise ExportException("While processing %s: Tetrahedral mesh expected!" % o.name)

    points =  np.empty((len(m.vertices),3))
    for i, v in enumerate(m.vertices):
        points[i] = vec_safe(v.co)

    tetrahedra = np.empty([len(m.tetrahedra), 4],dtype=int)
    for i, f in enumerate(m.tetrahedra):
        tetrahedra[i] = [f.vertices[0], f.vertices[1], f.vertices[2], f.vertices[3]]

    c =  ET.Element('TetrahedronSetTopologyContainer', name= name, createTriangleArray='true', points = points, tetrahedra = tetrahedra)
    return geometryNode(opt,c)

def exportHexahedralTopology(o, opt, name):
    if o.type == 'MESH' and hasattr(o.data,'hexahedra') and len(o.data.hexahedra) > 0:
        m = o.data
    else:
        raise ExportException("While processing %s: Hexahedral mesh expected!" % o.name)

    points =  np.empty((len(m.vertices),3))
    for i, v in enumerate(m.vertices):
        points[i] = vec_safe(v.co)

    hexahedra = np.empty([len(m.hexahedra), 8],dtype=int)
    for i, f in enumerate(m.hexahedra):
        hexahedra[i] = [f.vertices[0], f.vertices[1], f.vertices[2], f.vertices[3], f.vertices[4], f.vertices[5], f.vertices[6], f.vertices[7]]

    c =  ET.Element('HexahedronSetTopologyContainer', name= name, position = points, hexahedra = hexahedra) # createTriangleArray='1'
    return geometryNode(opt,c)
def exportThickShellCollision(o, opt, name):
    if o.alternativeCollision:
        collisionObject = opt.scene.objects[o.alternativeCollision]
        #m = collisionObject.to_mesh(opt.scene, True, 'PREVIEW')
        m = collisionObject.to_mesh()
    else:
        #m = o.to_mesh(opt.scene, True, 'PREVIEW')
        m = o.to_mesh()

    thickness = o.thickness
    layerCount    = o.layerCount
    assert(layerCount >= 1)
    V = len(m.vertices)
    rj = list(range(-layerCount,1)) # [-1,0]
    points =  np.empty([V * (layerCount+1),3])
    for i, v in enumerate(m.vertices): #[i, vertices[i]]
        for j, offset in enumerate(rj): #j=0,1... offset= ...,-2,-1,0
            vn = vec_safe(v.co) + vec_safe(v.normal) * offset * thickness
            #vn = v.co * j + m_shrink.vertices[i].co * (1-j);
            points[i+V*j][0] = vn[0]
            points[i+V*j][1] = vn[1]
            points[i+V*j][2] = vn[2]

    quads = list(filter(lambda f: len(f.vertices) == 4, m.polygons))
    quadCount = len(quads)

    # bpy.ops.object.select_all(action='DESELECT')
    # o_shrink.select = True;
    # bpy.ops.object.delete(use_global=False);

    if quadCount == 0 : raise ExportException("Object '%s' has to be a quad mesh for a thick shell topology" % o.name)

    # hexahedra = np.empty([quadCount * layerCount, 8], dtype=int)
    # for i, f in enumerate(quads):
      # for l in range(0, layerCount):
        # hexahedra[l*quadCount+i] = [f.vertices[0]+l*V,f.vertices[1]+l*V,f.vertices[2]+l*V,f.vertices[3]+l*V,f.vertices[0]+(l+1)*V,f.vertices[1]+(l+1)*V,f.vertices[2]+(l+1)*V,f.vertices[3]+(l+1)*V]


    # first one is inner, second one is outer shell
    shell = [ np.empty([quadCount*2, 3], dtype=int), np.empty([quadCount*2, 3], dtype=int) ]

    for i, f in enumerate(quads):
        shell[1][i*2  ] = [f.vertices[0],f.vertices[1],f.vertices[2]]
        shell[1][i*2+1] = [f.vertices[0],f.vertices[2],f.vertices[3]]
        shell[0][i*2  ] = [f.vertices[0],f.vertices[2],f.vertices[1]]
        shell[0][i*2+1] = [f.vertices[0],f.vertices[3],f.vertices[2]]

    oshell = ET.Element('MeshTopology', name = name + "-outer", triangles = shell[1], points = points[V*layerCount:V*(layerCount+1), ...])
    ishell = ET.Element('MeshTopology', name = name + "-inner", triangles = shell[0], points = points[0:V, ...])
    o.to_mesh_clear()
    return geometryNode(opt, oshell), geometryNode(opt, ishell)

def exportThickShellTopologies(o, opt, name): #currently using triangle for visual model since quad mesh may not be planar
    # bpy.ops.object.select_all(action='DESELECT')
    #m = o.to_mesh(opt.scene, True, 'PREVIEW')
    m = o.to_mesh()
    if hasattr(o.data, "hexahedra") and len(o.data.hexahedra) > 0: raise ExportException("Object '%s' can not have volumetric data for a thick shell topology" % o.name)
    # o.select = True;
    # bpy.ops.object.duplicate();
    # print("duplicate done")
    # o_shrink = bpy.context.active_object;
    # bpy.ops.object.mode_set(mode = 'EDIT')
    # bpy.ops.mesh.select_all(action='TOGGLE')
    # bpy.ops.transform.shrink_fatten(value=o.thickness, use_even_offset=False, mirror=False, proportional='DISABLED', proportional_edit_falloff='SMOOTH', proportional_size=1.0)
    # print("shrink done")
    # bpy.ops.object.mode_set(mode = 'OBJECT')
    # m_shrink = o_shrink.to_mesh(opt.scene, True, 'PREVIEW');
    # print('m_srhink len: ',len(m_shrink.vertices))

    # m = o.to_mesh(opt.scene, True, 'PREVIEW')
    # bm = bmesh.new()
    # bm.from_mesh(m)
    # r = bmesh.ops.triangulate(bm, faces = bm.faces)
    thickness = o.thickness
    layerCount    = o.layerCount
    assert(layerCount >= 1)
    V = len(m.vertices)
    rj = list(range(-layerCount,1)) # [-1,0]
    points =  np.empty([V * (layerCount+1),3])
    for i, v in enumerate(m.vertices): #[i, vertices[i]]
        for j, offset in enumerate(rj): #j=0,1... offset= ...,-2,-1,0
            vn = vec_safe(v.co) + vec_safe(v.normal) * offset * thickness
            #vn = v.co * j + m_shrink.vertices[i].co * (1-j);
            points[i+V*j][0] = vn[0]
            points[i+V*j][1] = vn[1]
            points[i+V*j][2] = vn[2]

    quads = list(filter(lambda f: len(f.vertices) == 4, m.polygons))
    quadCount = len(quads)

    # bpy.ops.object.select_all(action='DESELECT')
    # o_shrink.select = True;
    # bpy.ops.object.delete(use_global=False);

    if quadCount == 0 : raise ExportException("Object '%s' has to be a quad mesh for a thick shell topology" % o.name)

    hexahedra = np.empty([quadCount * layerCount, 8], dtype=int)
    for i, f in enumerate(quads):
        for l in range(0, layerCount):
            hexahedra[l*quadCount+i] = [f.vertices[0]+l*V,f.vertices[1]+l*V,f.vertices[2]+l*V,f.vertices[3]+l*V,f.vertices[0]+(l+1)*V,f.vertices[1]+(l+1)*V,f.vertices[2]+(l+1)*V,f.vertices[3]+(l+1)*V]


    # first one is inner, second one is outer shell
    shell = [ np.empty([quadCount*2, 3], dtype=int), np.empty([quadCount*2, 3], dtype=int) ]

    for i, f in enumerate(quads):
        shell[1][i*2  ] = [f.vertices[0],f.vertices[1],f.vertices[2]]
        shell[1][i*2+1] = [f.vertices[0],f.vertices[2],f.vertices[3]]
        shell[0][i*2  ] = [f.vertices[0],f.vertices[2],f.vertices[1]]
        shell[0][i*2+1] = [f.vertices[0],f.vertices[3],f.vertices[2]]

    oshell = ET.Element('MeshTopology', name = name + "-outer", triangles = shell[1], points = points[V*layerCount:V*(layerCount+1), ...])
    ishell = ET.Element('MeshTopology', name = name + "-inner", triangles = shell[0], points = points[0:V, ...])
    c =  ET.Element('HexahedronSetTopologyContainer', name= name, position = points, hexahedra = hexahedra)
    o.to_mesh_clear()
    return geometryNode(opt,c), geometryNode(opt, oshell), geometryNode(opt, ishell)

def addConstraintCorrection(o, t):
    if o.precomputeConstraints:
        t.append(ET.Element('PrecomputedConstraintCorrection', rotations="true", recompute="false"))
    else:
        t.append(ET.Element('UncoupledConstraintCorrection'))

#CURVE2HEX = [ 3,2,1,0, 7,6,5,4 ]
CURVE2HEX = [ 0,1,2,3,4,5,6,7 ]
def exportThickCurveTopology(o, opt, name):
    if hasattr(o.data, 'bevel_resolution') and o.data.bevel_resolution > 0 :
        raise ExportException("The bevel_resolution of '%s' has to be 0 for a thick curve topology" % o.name)
    if hasattr(o.data, 'bevel_resolution'):
        o.data.bevel_resolution = 0
    #m = o.to_mesh(opt.scene, True, 'PREVIEW')
    m = o.to_mesh()

    points =  np.empty([len(m.vertices),3], dtype=float)
    for i, v in enumerate(m.vertices):
        points[i] = vec_safe(v.co)

    H = int(len(m.vertices)/4-1)
    hexahedra = np.empty([H, 8], dtype=int)
    for i in range(H):
        for j in range(8):
            hexahedra[i][j] = i*4 + CURVE2HEX[j]

    o.to_mesh_clear()
    return geometryNode(opt, ET.Element('HexahedronSetTopologyContainer', name = name, position = points, hexahedra = hexahedra))

# There is a chance for this function to crash Blender due to a bug which has not yet been fixed on the latest version (2.92 as of this writing)
def exportThickCurve(o, opt, l):
    if o not in l:
        return
    name = fixName(o.name)
    t = ET.Element("Node", name = name)
    #t.set('authorparent', 'SolverNode')
    #t.set('authororder', 1)
    if o.local_gravity:
        t.append(ET.Element('Gravity', gravity = o.local_gravity))
    topo = name + '-topology'
    t.append(exportThickCurveTopology(o, opt, topo))

    t.append(createMechanicalObject(o))
    t.append(ET.Element('HexahedronSetTopologyModifier', removeIsolated = 'false'))
    #t.append(ET.Element('HexahedronSetTopologyAlgorithms',template="Vec3d"))
    t.append(ET.Element('HexahedronSetGeometryAlgorithms',template="Vec3d"))

    # set massDensity later
    if opt.scene.versionSOFA == "18":
        t.append(ET.Element("UniformMass", vertexMass = o.totalMass, handleTopoChange="true"))
    else:
        t.append(ET.Element("UniformMass", mass = o.totalMass))
    #h = ET.Element("HexahedronFEMForceField",template="Vec3d", method="large")
    if o.materialType == "ELASTIC":
        h = ET.Element("HexahedronFEMForceField",method="large")
        addElasticityParameters(o,h)
    elif o.materialType == "PLASTIC":
        if o.plasticityMethods == "SOFA":
            h = ET.Element("TetrahedronFEMForceField",method=o.displacementMethod)
            addElasticityParameters(o,h)
            addPlasticityParameters(o,h)
        elif o.plasticityMethods == "ConstantCenter":
            h = ET.Element("HexahedralFEMForceField",method=o.displacementMethod, preserveElementVolume="true")
            addElasticityParameters(o,h)
            addPlasticityParameters(o,h)
        elif o.plasticityMethods == "PhongVertex":
            h = ET.Element("HexahedralFEMForceField",method=o.displacementMethod, useVertexPlasticity="true")
            addElasticityParameters(o,h)
            addPlasticityParameters(o,h)
        elif o.plasticityMethods == "TrilinearVertexVolumeMethod1":
            h = ET.Element("HexahedralFEMForceField",method=o.displacementMethod, useVertexPlasticity="true", preserveElementVolume="true", debugPlasticMethod="0")
            addElasticityParameters(o,h)
            addPlasticityParameters(o,h)
        elif o.plasticityMethods == "TrilinearVertexVolumeMethod2":
            h = ET.Element("HexahedralFEMForceField",method=o.displacementMethod, useVertexPlasticity="true", preserveElementVolume="true", debugPlasticMethod="1")
            addElasticityParameters(o,h)
            addPlasticityParameters(o,h)
        elif o.plasticityMethods == "TrilinearVertexVolumeMethod3":
            h = ET.Element("HexahedralFEMForceField",method=o.displacementMethod, useVertexPlasticity="true", preserveElementVolume="true", debugPlasticMethod="2")
            addElasticityParameters(o,h)
            addPlasticityParameters(o,h)
        else:
            self.report({'ERROR'}, "Methods not implemented...")

    t.append(h)
    # unstable hyperelastic below , commented out
    # elif o.materialType == "HYPERELASTIC":
    #     h = ET.Element("TetrahedronHyperelasticityFEMForceField", name="HyperelasticFEM", ParameterSet="3448.2759 31034.483", materialName=o.materialName)

    if o.damping > 0:
        dampstr = str(o.damping)+' '+str(o.damping)+' '+str(o.damping)+' '+str(o.damping)+' '+str(o.damping)+' '+str(o.damping)
        dmp = ET.Element("DiagonalVelocityDampingForceField", template="Vec3d",  dampingCoefficient= dampstr) # "0.05 0.05 0.05 0.05 0.05 0.05")
        t.append(dmp)
    addConstraintCorrection(o, t)
    addConstraints(o, t)


    if o.carvable:
        qs = ET.Element('Node', name="quad-surface")
        qs.append(ET.Element("QuadSetTopologyContainer", name=name + "-quadSurf"))
        qs.append(ET.Element("QuadSetGeometryAlgorithms", template="Vec3d"))
        qs.append(ET.Element("QuadSetTopologyModifier"))
        #qs.append(ET.Element("QuadSetTopologyAlgorithms", template="Vec3d"))
        qs.append(ET.Element("Hexa2QuadTopologicalMapping", input='@../' + topo, output="@" + name + "-quadSurf"))
        if o.useShader:
            if not o.shaderFile:
                print("no default shader for thick curve exists!")
            else:
                oglshd = ET.Element("OglShader", fileVertexShaders = o.shaderFile, fileTessellationControlShaders = o.shaderFile,
                fileTessellationEvaluationShaders = o.shaderFile, fileFragmentShaders = o.shaderFile, printLog="1");
                ogltesslvl = ET.Element("OglFloatVariable", name="TessellationLevel", value = "6")
                qs.append(oglshd)
                qs.append(ogltesslvl)
                ogl = ET.Element("OglModel", name= name + '-visual', primitiveType = "PATCHES");
        else:
            ogl = ET.Element("OglModel", name= name + '-visual');
        qs.append(ogl)
        addMaterial(o, ogl);
        qs.append(ET.Element('IdentityMapping', input="@../MO", output="@" + name + '-visual'))

        ts = ET.Element('Node', name="triangle-surface")
        ts.append(ET.Element('TriangleSetTopologyContainer',name=name + '-triSurf'))
        ts.append(ET.Element('TriangleSetTopologyModifier'))
        #ts.append(ET.Element('TriangleSetTopologyAlgorithms', template="Vec3d"))
        ts.append(ET.Element('TriangleSetGeometryAlgorithms', template="Vec3d"))
        ts.append(ET.Element('Quad2TriangleTopologicalMapping', input = "@../" + name + "-quadSurf", output = "@" + name + "-triSurf"))
        ts.extend(collisionModelParts(o, opt))

        qs.append(ts)
        t.append(qs)
    else:
        n = ET.Element('Node', name="Collision")
        n.append(exportTriangularTopology(o,opt))
        moc = createMechanicalObject(o)
        moc.set('name', 'MOC')
        n.append(moc)
        n.extend(collisionModelParts(o, opt))
        n.append(ET.Element("BarycentricMapping",input="@../MO",output="@MOC"))
        t.append(n)

        v = ET.Element('Node', name="Visual")
        v.append(exportVisual(o, opt, l, name = name + "-visual"))
        v.append(ET.Element("BarycentricMapping",template="Vec3d,ExtVec3d",input="@../MO",output= '@' + name + "-visual"))
        t.append(v)

    return t

def exportThickQuadShell(o, opt, l):
    if o not in l:
        return
    name = fixName(o.name)
    t = ET.Element("Node", name = name)
    t.set('author-parent' , 'SolverNode')
    t.set('author-order', 1)
    if o.local_gravity:
        t.append(ET.Element('Gravity', gravity = o.local_gravity))
    topo = name + '-hexahedral-topology'
    c, oshell, ishell = exportThickShellTopologies(o, opt, topo)
    oshellcollision, ishellcollision = exportThickShellCollision(o,opt,topo)
    t.append(c)

    t.append(createMechanicalObject(o))

    t.append(ET.Element('HexahedronSetTopologyModifier'))
    #t.append(ET.Element('HexahedronSetTopologyAlgorithms'))
    t.append(ET.Element('HexahedronSetGeometryAlgorithms'))

    t.append(ET.Element("DiagonalMass", massDensity = o.totalMass, name="diagonalMass"))

    # FEM and materials
    if o.materialType == "ELASTIC":
        h = ET.Element("HexahedronFEMForceField",method=o.displacementMethod)
        addElasticityParameters(o,h)
    elif o.materialType == "PLASTIC":
        if o.plasticityMethods == "SOFA":
            h = ET.Element("TetrahedronFEMForceField",method=o.displacementMethod)
            addElasticityParameters(o,h)
            addPlasticityParameters(o,h)
        elif o.plasticityMethods == "ConstantCenter":
            h = ET.Element("HexahedralFEMForceField",method=o.displacementMethod, preserveElementVolume="true")
            addElasticityParameters(o,h)
            addPlasticityParameters(o,h)
        elif o.plasticityMethods == "PhongVertex":
            h = ET.Element("HexahedralFEMForceField",method=o.displacementMethod, useVertexPlasticity="true")
            addElasticityParameters(o,h)
            addPlasticityParameters(o,h)
        elif o.plasticityMethods == "TrilinearVertexVolumeMethod1":
            h = ET.Element("HexahedralFEMForceField",method=o.displacementMethod, useVertexPlasticity="true", preserveElementVolume="true", debugPlasticMethod="0")
            addElasticityParameters(o,h)
            addPlasticityParameters(o,h)
        elif o.plasticityMethods == "TrilinearVertexVolumeMethod2":
            h = ET.Element("HexahedralFEMForceField",method=o.displacementMethod, useVertexPlasticity="true", preserveElementVolume="true", debugPlasticMethod="1")
            addElasticityParameters(o,h)
            addPlasticityParameters(o,h)
        elif o.plasticityMethods == "TrilinearVertexVolumeMethod3":
            h = ET.Element("HexahedralFEMForceField",method=o.displacementMethod, useVertexPlasticity="true", preserveElementVolume="true", debugPlasticMethod="2")
            addElasticityParameters(o,h)
            addPlasticityParameters(o,h)
        else:
            self.report({'ERROR'}, "Methods not implemented...")
    t.append(h)

    # t.append(h)
    if o.damping > 0:
        dmp = ET.Element("DiagonalVelocityDampingForceField", template="Vec3d",  dampingCoefficient="0.05 0.05 0.05 0.05 0.05 0.05")
        t.append(dmp)
    addConstraintCorrection(o, t)
    addConstraints(o, t)


    for i, tp in enumerate([ oshellcollision, ishellcollision ]):
        n = ET.Element('Node')
        if i == 0:
            n.set('name', 'CollisionOuter')
        else:
            break # note: disabled the innerCollisionShell here to save computation cost.
            n.set('name', 'CollisionInner')
        n.append(tp)
        n.append(ET.Element('TriangleSetTopologyContainer', src = "@" + tp.get('name')))
        n.append(ET.Element('EdgeSetTopologyModifier'))
        moc = createMechanicalObject(o)
        moc.set('name', 'MOC')
        n.append(moc)
        # n.extend(collisionModelParts(o, opt, group = o.collisionGroup + i, bothSide = 0)) the '+i' here is unnecessary and creates high computation cost
        n.extend(collisionModelParts(o, opt, group = o.collisionGroup, bothSide = 0))
        n.append(ET.Element("BarycentricMapping",input="@../MO",output="@MOC"))

      # #Visual Model: triangle surface
      # vt = ET.Element('Node', name="Visual_trisurf")
      # vt.append(ET.Element("TriangleSetTopologyContainer", name= name + "-triSurf", src = "@../" + tp.get('name')))
      # if o.shaderFile and o.useTessellation:
      #     oglshd = ET.Element("OglShader", fileVertexShaders = o.shaderFile, fileTessellationControlShaders = o.shaderFile,
      #            fileTessellationEvaluationShaders = o.shaderFile, fileFragmentShaders = o.shaderFile, printLog="1")
      #     ogltesslvl = ET.Element("OglFloatVariable", name="TessellationLevel", value = "6")
      #     vt.append(oglshd)
      #     vt.append(ogltesslvl)
      #     ogl = ET.Element("OglModel", primitiveType = "PATCHES", name= name + '-triSurf-visual')
      #     addMaterial(o, ogl)
      #     vt.append(ogl)
      #     vt.append(ET.Element("IdentityMapping", input="@../../MO", output='@' + name + "-triSurf-visual"))
      # elif o.shaderFile and not o.useTessellation:
      #     oglshd = ET.Element("OglShader", fileVertexShaders = o.shaderFile, fileFragmentShaders = o.shaderFile, printLog="1");
      #     vt.append(oglshd)
      #     ogl = ET.Element("OglModel", name= name + '-triSurf-visual');
      #     addMaterial(o, ogl);
      #     vt.append(ogl)
      #     vt.append(ET.Element("IdentityMapping", input="@../../MO", output='@' + name + "-triSurf-visual"))
      # else:
      #     vt.append(exportVisual(o, opt, name = name + "-visual"))
      #     vt.append(ET.Element("BarycentricMapping",template="Vec3d,ExtVec3d",input="@../../MO",output='@' + name + "-visual"))
      # n.append(vt)
        t.append(n)

        #Visual Model: triangle surface
        vt = ET.Element('Node', name="Visual_trisurf")
        vt.append(oshell)
        vt.append(ET.Element("TriangleSetTopologyContainer", name= name + "-triSurf", src = "@" + oshell.get('name')))
        if o.shaderFile and o.useTessellation:
          oglshd = ET.Element("OglShader", fileVertexShaders = o.shaderFile, fileTessellationControlShaders = o.shaderFile,
                 fileTessellationEvaluationShaders = o.shaderFile, fileFragmentShaders = o.shaderFile, printLog="1")
          ogltesslvl = ET.Element("OglFloatVariable", name="TessellationLevel", value = "6")
          vt.append(oglshd)
          vt.append(ogltesslvl)
          ogl = ET.Element("OglModel", primitiveType = "PATCHES", name= name + '-triSurf-visual')
          addMaterial(o, ogl)
          vt.append(ogl)
          vt.append(ET.Element("IdentityMapping", input="@../MO", output='@' + name + "-triSurf-visual"))
        elif o.shaderFile and not o.useTessellation:
          oglshd = ET.Element("OglShader", fileVertexShaders = o.shaderFile, fileFragmentShaders = o.shaderFile, printLog="1");
          vt.append(oglshd)
          ogl = ET.Element("OglModel", name= name + '-triSurf-visual');
          addMaterial(o, ogl);
          vt.append(ogl)
          vt.append(ET.Element("IdentityMapping", input="@../MO", output='@' + name + "-triSurf-visual"))
        else:
          vt.append(exportVisual(o, opt, name = name + "-visual"))
          vt.append(ET.Element("BarycentricMapping",template="Vec3d,ExtVec3d",input="@../MO",output='@' + name + "-visual"))
        t.append(vt)

    # The Following been commented out since we only want the visual from outter collision shell
    # Visual: currently using triangle for visual model since quad mesh may not be planar
    # v = ET.Element('Node', name="Visual")
    # v.append(ET.Element("QuadSetTopologyContainer", name= name + "-quadSurf"))
    # v.append(ET.Element("QuadSetGeometryAlgorithms", template="Vec3d"))
    # v.append(ET.Element("QuadSetTopologyModifier"))
    # v.append(ET.Element("QuadSetTopologyAlgorithms", template="Vec3d"))
    # v.append(ET.Element("Hexa2QuadTopologicalMapping", input='@../' + topo, output="@" + name + "-quadSurf"))
    # smoothSurface = False

    # # vt.append(ET.Element("TriangleSetTopologyAlgorithms", template="Vec3d"))
    # # vt.append(ET.Element("TriangleSetGeometryAlgorithms", template="Vec3d"))
    # # smoothSurface = True
    # if smoothSurface:
    #     v.append(ET.Element('RequiredPlugin', name='SurfLabSplineSurface'));
    #     b3 = ET.Element('BiCubicSplineSurface');
    #     addMaterialToBicubic(o, b3);
    #     v.append(b3);
    # elif o.useShader:
    #     if not o.shaderFile:
    #         print("no default shader for thick shell exists!")
    #     else:#assuming using tessellation shader here
    #         vt = ET.Element('Node', name="Visual-tri")
    #         vt.append(ET.Element("TriangleSetTopologyContainer", name= name + "-triSurf"))
    #         vt.append(ET.Element("TriangleSetTopologyModifier"))
    #         vt.append(ET.Element("Quad2TriangleTopologicalMapping", input='@../' + name + "-quadSurf", output="@" + name + "-triSurf"))
    #         oglshd = ET.Element("OglShader", fileVertexShaders = o.shaderFile, fileTessellationControlShaders = o.shaderFile,
    #          fileTessellationEvaluationShaders = o.shaderFile, fileFragmentShaders = o.shaderFile, printLog="1");
    #         ogltesslvl = ET.Element("OglFloatVariable", name="TessellationLevel", value = "6")
    #         vt.append(oglshd)
    #         vt.append(ogltesslvl)
    #         #manully add ogl
    #         ogl = ET.Element("OglModel", primitiveType = "PATCHES", name= name + '-triSurf-visual');
    #         addMaterial(o, ogl);
    #         vt.append(ogl)
    #         vt.append(ET.Element("IdentityMapping",input="@../../MO",output='@' + name + "-triSurf-visual"))
    #         v.append(vt)
    #     #vt.append(exportVisual(o, opt, name = name + "-triSurf-visual"))
    # else:
    #     v.append(exportVisual(o, opt, name = name + "-visual"))
    #     v.append(ET.Element("BarycentricMapping",template="Vec3d,ExtVec3d",input="@../MO",output='@' + name + "-visual"))
    # t.append(v)
    return t


def exportVolumetric(o, opt, l):
    name = fixName(o.name)
    t = ET.Element("Node", name = name)
    t.set('author-parent' , 'SolverNode')
    t.set('author-order', 1)
    if o.local_gravity:
        t.append(ET.Element('Gravity', gravity = o.local_gravity))
    topotetra = name + '-topology'
    t.append(exportTetrahedralTopology(o, opt, topotetra))
    t.append(createMechanicalObject(o))
    #t.append(ET.Element('TetrahedronSetTopologyModifier', removeIsolated = "false"))
    #t.append(ET.Element('TetrahedronSetTopologyAlgorithms', template = 'Vec3d'))
    t.append(ET.Element('TetrahedronSetGeometryAlgorithms', template = 'Vec3d'))

    # set massDensity later
    t.append(ET.Element("UniformMass", vertexMass = o.totalMass, handleTopoChange="true"))
    if o.materialType == "ELASTIC":
        h = ET.Element('TetrahedralCorotationalFEMForceField')
        addElasticityParameters(o,h)
    elif o.materialType == "PLASTIC":
        h = ET.Element("TetrahedronFEMForceField",method="large",computeVonMisesStress="1")
        addElasticityParameters(o,h)
        addPlasticityParameters(o,h)
    # elif o.materialType == "HYPERELASTIC":
    #     h = ET.Element("TetrahedronHyperelasticityFEMForceField", name="HyperelasticFEM", ParameterSet="3448.2759 31034.483", materialName=o.materialName)
    t.append(h)
    if o.damping > 0:
        dmp = ET.Element("DiagonalVelocityDampingForceField", template="Vec3d",  dampingCoefficient="0.05 0.05 0.05 0.05 0.05 0.05")
        t.append(dmp)
    addConstraintCorrection(o, t)
    addConstraints(o, t)

    if o.carvable:
        n = ET.Element('Node', name="triangle-surface")
        n.append(ET.Element("TriangleSetTopologyContainer",name="topotri"))
        n.append(ET.Element("TriangleSetTopologyModifier",))
        #n.append(ET.Element("TriangleSetTopologyAlgorithms", template="Vec3d" ))
        n.append(ET.Element("TriangleSetGeometryAlgorithms", template="Vec3d"))

        n.append(ET.Element('Tetra2TriangleTopologicalMapping', input="@../"+topotetra, output="@topotri", flipNormals='true'))
        if o.useShader and o.useTessellation:
            ogl = ET.Element("OglModel", name="Visual", primitiveType="PATCHES");
        else:
            ogl = ET.Element("OglModel", name="Visual");
        if o.useShader:
          if not o.shaderFile:
            print("no default shader for volumetric exists!")
          elif o.useTessellation:
            oglshd = ET.Element("OglShader", fileVertexShaders = o.shaderFile, fileGeometryShaders=o.shaderFile, fileTessellationControlShaders = o.shaderFile,
             fileTessellationEvaluationShaders = o.shaderFile, fileFragmentShaders = o.shaderFile, printLog="1");
            ogltesslvl = ET.Element("OglFloatVariable", name="TessellationLevel", value = "8")
            n.append(oglshd)
            n.append(ogltesslvl)
          elif not o.useTessellation:
            oglshd = ET.Element("OglShader", fileVertexShaders = o.shaderFile, fileFragmentShaders = o.shaderFile, printLog="1");
            n.append(oglshd)
        addMaterial(o, ogl);
        n.append(ogl)
        n.append(ET.Element("IdentityMapping",input="@../MO",output="@Visual"))
        n.extend(collisionModelParts(o, opt))
        t.append(n)

    else:
        n = ET.Element('Node', name="Collision")
        n.append(exportTriangularTopology(o,opt))
        moc = createMechanicalObject(o)
        moc.set('name', 'MOC')
        n.append(moc)
        n.extend(collisionModelParts(o, opt))
        n.append(ET.Element("BarycentricMapping",input="@../MO",output="@MOC"))
        t.append(n)

        v = ET.Element('Node', name="Visual")
        addShadertoVisual(o,v)

        v.append(exportVisual(o, opt, l, name = name + "-visual"))
        v.append(ET.Element("BarycentricMapping",template="Vec3d,ExtVec3d",input="@../MO",output="@"+name + "-visual"))
        t.append(v)

    #addConnectionsToTissue(t, o, opt)
    return t

def exportHexVolumetric(o, opt, l):
    name = fixName(o.name)
    t = ET.Element("Node", name = name)
    if o.local_gravity:
        t.append(ET.Element('Gravity', gravity = o.local_gravity))
    topotetra = name + '-topology'
    t.append(exportHexahedralTopology(o, opt, topotetra))

    t.append(createMechanicalObject(o))
    t.append(ET.Element('HexahedronSetTopologyModifier', removeIsolated = "false"))
    #t.append(ET.Element('HexahedronSetTopologyAlgorithms', template = 'Vec3d'))
    t.append(ET.Element('HexahedronSetGeometryAlgorithms', template = 'Vec3d'))

    # set massDensity later
    if opt.scene.versionSOFA == "18":
        t.append(ET.Element("UniformMass", vertexMass = o.totalMass, handleTopoChange="true"))
    else:
        t.append(ET.Element("UniformMass", mass = o.totalMass))
    if o.materialType == "ELASTIC":
        h = ET.Element("HexahedronFEMForceField",method=o.displacementMethod)
        addElasticityParameters(o,h)
    elif o.materialType == "PLASTIC":
        if o.plasticityMethods == "SOFA":
            h = ET.Element("TetrahedronFEMForceField",method=o.displacementMethod)
            addElasticityParameters(o,h)
            addPlasticityParameters(o,h)
        elif o.plasticityMethods == "ConstantCenter":
            h = ET.Element("HexahedralFEMForceField",method=o.displacementMethod, preserveElementVolume="true")
            addElasticityParameters(o,h)
            addPlasticityParameters(o,h)
        elif o.plasticityMethods == "PhongVertex":
            h = ET.Element("HexahedralFEMForceField",method=o.displacementMethod, useVertexPlasticity="true")
            addElasticityParameters(o,h)
            addPlasticityParameters(o,h)
        elif o.plasticityMethods == "TrilinearVertexVolumeMethod1":
            h = ET.Element("HexahedralFEMForceField",method=o.displacementMethod, useVertexPlasticity="true", preserveElementVolume="true", debugPlasticMethod="0")
            addElasticityParameters(o,h)
            addPlasticityParameters(o,h)
        elif o.plasticityMethods == "TrilinearVertexVolumeMethod2":
            h = ET.Element("HexahedralFEMForceField",method=o.displacementMethod, useVertexPlasticity="true", preserveElementVolume="true", debugPlasticMethod="1")
            addElasticityParameters(o,h)
            addPlasticityParameters(o,h)
        elif o.plasticityMethods == "TrilinearVertexVolumeMethod3":
            h = ET.Element("HexahedralFEMForceField",method=o.displacementMethod, useVertexPlasticity="true", preserveElementVolume="true", debugPlasticMethod="2")
            addElasticityParameters(o,h)
            addPlasticityParameters(o,h)
        else:
            self.report({'ERROR'}, "Methods not implemented...")
    t.append(h)
    if o.damping > 0:
        dmp = ET.Element("DiagonalVelocityDampingForceField", template="Vec3d",  dampingCoefficient="0.05 0.05 0.05 0.05 0.05 0.05")
        t.append(dmp)
    addConstraintCorrection(o, t)
    addConstraints(o, t)

    if o.carvable:
        qs = ET.Element('Node', name="quad-surface")
        qs.append(ET.Element("QuadSetTopologyContainer", name=name + "-quadSurf"))
        qs.append(ET.Element("QuadSetGeometryAlgorithms", template="Vec3d"))
        qs.append(ET.Element("QuadSetTopologyModifier"))
        #qs.append(ET.Element("QuadSetTopologyAlgorithms", template="Vec3d"))
        qs.append(ET.Element("Hexa2QuadTopologicalMapping", input='@../' + topotetra, output="@" + name + "-quadSurf"))

        if o.useShader:
            if not o.shaderFile:
                oglshd = ET.Element("OglShader", fileVertexShaders = "['shaders/TIPSShaders/texture3d.glsl']", fileFragmentShaders = "['shaders/TIPSShaders/texture3d.glsl']", printLog="1");
                qs.append(oglshd)
                ogl = ET.Element("OglModel", name= name + '-visual');
            else:
                oglshd = ET.Element("OglShader", fileVertexShaders = o.shaderFile, fileTessellationControlShaders = o.shaderFile,
                    fileTessellationEvaluationShaders = o.shaderFile, fileFragmentShaders = o.shaderFile, printLog="1");
                ogltesslvl = ET.Element("OglFloatVariable", name="TessellationLevel", value = "8")
                qs.append(oglshd)
                qs.append(ogltesslvl)
                ogl = ET.Element("OglModel", primitiveType = "PATCHES", name= name + '-visual');
        else:
            ogl = ET.Element("OglModel", name= name + '-visual');
        qs.append(ogl)
        addMaterial(o, ogl);
        qs.append(ET.Element('IdentityMapping', input="@../MO", output="@" + name + '-visual'))

        ts = ET.Element('Node', name="triangle-surface")
        ts.append(ET.Element('TriangleSetTopologyContainer',name=name + '-triSurf'))
        ts.append(ET.Element('TriangleSetTopologyModifier'))
        #ts.append(ET.Element('TriangleSetTopologyAlgorithms', template="Vec3d"))
        ts.append(ET.Element('TriangleSetGeometryAlgorithms', template="Vec3d"))
        ts.append(ET.Element('Quad2TriangleTopologicalMapping', input = "@../" + name + "-quadSurf", output = "@" + name + "-triSurf"))
        ts.extend(collisionModelParts(o,opt))

        qs.append(ts)
        t.append(qs)
    else:
        n = ET.Element('Node', name="Collision")
        n.append(exportTriangularTopology(o,opt))
        moc = createMechanicalObject(o)
        moc.set('name', 'MOC')
        n.append(moc)
        n.extend(collisionModelParts(o, opt))
        n.append(ET.Element("BarycentricMapping",input="@../MO",output="@MOC"))
        t.append(n)

        v = ET.Element('Node', name="Visual")
        v.append(exportVisual(o, opt, l, name = name + "-visual"))
        v.append(ET.Element("BarycentricMapping",template="Vec3d,ExtVec3d",input="@../MO",output="@"+name + "-visual"))
        t.append(v)

    return t

def cwisemul(a, b):
    return Vector([ a.x * b.x, a.y * b.y, a.z * b.z ])

def addConstraints(o, t):
    if o.fixed_indices:
        if not o.fixed_direction:
            t.append(ET.Element("PartialFixedConstraint", name="partialFixedConstraint", fixedDirections="1 1 1", indices=o.fixed_indices))
        else:
            t.append(ET.Element("PartialFixedConstraint", name="partialFixedConstraint", fixedDirections=o.fixed_direction, indices=o.fixed_indices))

        #t.append(ET.Element("FixedConstraint", indices=o.fixed_indices))
    else:
        for q in o.children:
            if not q.hide_render:
                n = fixName(q.name)
                if q.name.startswith('BoxConstraint') or q.template == 'BOXCONSTRAINT':
                    q_bound_box = q.bound_box
                    tl = q.matrix_world @ Vector(q_bound_box[0])
                    br = q.matrix_world @ Vector(q_bound_box[6])
                    b = array('d')
                    b.extend(tl)
                    b.extend(br)
                    t.append(ET.Element("BoxROI",name=n,box=b))
                    t.append(ET.Element("FixedConstraint", indices="@%s.indices" % n))
                elif q.name.startswith('SphereConstraint') or q.template == 'SPHERECONSTRAINT':
                    t.append(ET.Element("SphereROI",name=n,centers=(q.matrix_world.translation),radii=(max(cwisemul(q.parent.scale, q.scale)))))
                    t.append(ET.Element("FixedConstraint", indices="@%s.indices" % n))

def collisionModelParts(o, opt, obstacle = False, group = None, bothSide = 0):
    if o.interactive and o.template == 'THICKCURVE':
        if any(c in o.name for c in ("vein", "Vein", "artery", "Artery")):
            objectTag = 'HapticSurfaceVein SafetyForceThreshold_' + str(o.safetyForceThreshold)
        else:
            objectTag = 'HapticSurfaceCurve'
    elif o.interactive and o.template == 'SAFETYSURFACE':
        objectTag = 'SafetySurface'

    elif o.interactive and o.template == 'VOLUMETRIC':
        objectTag = 'HapticSurface HapticSurfaceVolume SafetyForceThreshold_' + str(o.safetyForceThreshold)
    elif o.interactive and o.template == 'DEFORMABLE':
        # if o.safetyConcern:
        #     objectTag = 'HapticSurface HapticSurfaceVolume SafetySurface'
        # else:
        objectTag = 'HapticSurface HapticSurfaceVolume SafetyForceThreshold_' + str(o.safetyForceThreshold)
    elif o.interactive and o.template == 'CLOTH':
        objectTag = 'HapticSurface HapticCloth'
    elif o.interactive:
        objectTag = 'HapticSurface'
    else:
        objectTag = ''
    if o.interactive and o.name == opt.scene.targetOrgan:
        objectTag = objectTag + ' TargetOrgan'
    if o.extraTag:
        objectTag = objectTag +' '+ o.extraTag
    M = not obstacle
    sc = o.selfCollision
    if group == None:  group = o.collisionGroup
    if o.template in ('THICKCURVE', 'VOLUMETRIC'):
        return [
            #ET.Element("PointModel",selfCollision=sc, contactFriction = o.contactFriction, contactStiffness = o.contactStiffness, group=group, moving = M, simulated = M, bothSide= bothSide ),
            ET.Element("PointCollisionModel",selfCollision=sc, contactFriction = o.contactFriction, active = "0", contactStiffness = o.contactStiffness, group=group, moving = M, simulated = M, bothSide= bothSide ),
            ET.Element("LineCollisionModel",selfCollision=sc,  contactFriction = o.contactFriction, contactStiffness = o.contactStiffness, group=group, moving = M, simulated = M, bothSide= bothSide ),
            ET.Element("TriangleCollisionModel", name="TriangleCollisionModel", tags = objectTag, selfCollision=sc, contactFriction = o.contactFriction, contactStiffness = o.contactStiffness, group=group, moving = M, simulated = M, bothSide= bothSide )
        ]
    else:
        return [
            ET.Element("PointCollisionModel",selfCollision=sc, proximity = o.proximity, contactFriction = o.contactFriction, contactStiffness = o.contactStiffness, group=group, moving = M, simulated = M, bothSide= bothSide ),
            # ET.Element("TPointModel", name = 'testPointCollision', contactStiffness=o.contactStiffness, bothSide="0", proximity = o.proximity, group= o.collisionGroup, movin = M ),
            ET.Element("LineCollisionModel",selfCollision=sc, proximity=o.proximity, contactFriction = o.contactFriction, contactStiffness = o.contactStiffness, group=group, moving = M, simulated = M, bothSide= bothSide ),
            ET.Element("TriangleCollisionModel", name="TriangleCollisionModel", tags = objectTag, selfCollision=sc, proximity=o.proximity, contactFriction = o.contactFriction, contactStiffness = o.contactStiffness, group=group, moving = M, simulated = M, bothSide= bothSide )
        ]


def exportInstrument(o, opt, l):
    n = fixName(o.name)
    t = ET.Element("Node", name = n, tags='instrument')
    t.set('author-parent' , 'Haptic-Instrument')
    t.set('author-order', 1)
    scn = opt.scene

    # Collision parts of the instrument, the instrument tips
    # an instrument usually has one tip, but in case of clamp object it can have two tips
    tip_names = []
    for i in o.children:
        if i.template == 'INSTRUMENTTIP':
            n = fixName(i.name)
            child = ET.Element("Node", name= n)
            tip_names.append(n)
            if i.type == 'MESH':
                child.append(exportTriangularTopology(i, opt))
            if o.toolFunction == 'CAMERA':
                mo = ET.Element("MechanicalObject",template="Rigid3d",name="CameraRealPosition", position="0 0 0 0 0 0 1")
            else:
                mo = createMechanicalObject(i)
                mo.set('name', 'CM');
            child.append(mo)
            # the contactStiffness below used to be 0.01, Ruiliang changed to 2.0 to soften the organs.
            if scn.precompution:
                pm = ET.Element("TPointModel", name = 'toolTip',
                               contactStiffness="0.000001", bothSide="0", proximity = i.proximity,
                               group= o.collisionGroup
                               )
            else:
                pm = ET.Element("TPointModel", name = 'toolTip',
                                 contactStiffness="15.0", bothSide="0", proximity = i.proximity,
                                 group= o.collisionGroup
                                 )
            if o.toolFunction == 'CARVE':
                pm.set('tags', 'CarvingTool '+ o.extraTag)
            elif o.toolFunction == 'DISSECT':
                pm.set('tags', 'DissectingTool '+ o.extraTag)
            elif o.toolFunction == 'SUTURE':
                pm.set('tags', 'SuturingTool')
            elif o.toolFunction == 'CLAMP':
                pm.set('tags', 'ClampingTool '+ o.extraTag)
            elif o.toolFunction == 'CONTAIN':
                pm.set('tags', 'ContainerTool '+ o.extraTag)
            elif o.toolFunction == 'CUT':
                pm.set('tags', 'CuttingTool '+ o.extraTag)
            elif o.toolFunction == 'CAMERA':
                pm.set('tags', 'CameraTool '+ o.extraTag)
            else:
                pm.set('tags', 'GraspingTool '+ o.extraTag)

            child.append(pm)
            if o.toolFunction == 'CAMERA':
                child.append(ET.Element("IdentityMapping", input="@../../../RigidLayer/ToolRealPosition",output="@CameraRealPosition"))
            else:
                child.append(ET.Element("RigidMapping", input="@../../instrumentState",output="@CM",index= 0))
            t.append(child)
        if i.template == 'INSTRUMENTCOLLISION':
            n = fixName(i.name)
            child = ET.Element("Node", name= n)
            if i.type == 'MESH':
                child.append(exportTriangularTopology(i, opt))
            mo = createMechanicalObject(i)
            mo.set('name', 'CM');
            child.append(mo)
            if scn.precompution:
                pm = ET.Element("PointModel", name = 'toolCollision', bothSide="0",
                               contactStiffness="0.00001", contactFriction="5.0", proximity = i.proximity,
                               group= o.collisionGroup, moving="1", selfCollision="0", simulated="1"
                               )
            else:
                pm = ET.Element("PointModel", name = 'toolCollision', bothSide="0",
                               contactStiffness="4.7", contactFriction="500.0", proximity = i.proximity,
                               group= o.collisionGroup, moving="1", selfCollision="0", simulated="1"
                               )
            if o.toolFunction == 'CAMERA':
                pm.set('tags', 'CameraTool')
            child.append(pm)
            child.append(ET.Element("RigidMapping", input="@../../instrumentState",output="@CM",index= 0))
            t.append(child)

    # currently camera tool doesn't work with collision model and haptic manager
    hm = ET.Element("HapticManager", omniDriver = '@../../RigidLayer/driver',
            graspStiffness = "1e3", attachStiffness="1e5", grasp_force_scale = "-1e-3", duration = "50")
    if o.toolFunction == 'CAMERA':
        hm.set('toolModel', "@testCollisionPart_endoscope/toolCollision")
        t.append(hm)
    else:
        if len(tip_names) == 1:
            hm.set('toolModel', '@'+ tip_names[0] + '/toolTip')
        elif len(tip_names) == 2:
            hm.set('upperJaw', '@'+ tip_names[0] + '/toolTip')
            hm.set('lowerJaw', '@'+ tip_names[1] + '/toolTip')
            hm.set('clampScale', '1 0.1 0.1')
        t.append(hm)

    # Visual parts of the instrument
    for i in o.children:
        if i.type == 'MESH':
            INSTRUMENT_PART_MAP = { 'LEFTJAW': 1, 'RIGHTJAW': 2, 'FIXED': 3, 'LEFTCLIP': 4, 'RIGHTCLIP': 5, 'TOOLSHAFT': 3, 'TOOLVISUALEFFECT':3 }
            idx = INSTRUMENT_PART_MAP[i.instrumentPart]
            name = fixName(i.name)
            child =  ET.Element("Node", name = name + '-visualNode')
            if i.template == 'INSTRUMENTPART'and i.instrumentPart == 'TOOLVISUALEFFECT':
                OglShd = ET.Element("OglShader", fileVertexShaders = "['shaders/TIPSShaders/burningiron.glsl']" , fileFragmentShaders = "['shaders/TIPSShaders/burningiron.glsl']", printLog="1");
                child.append(OglShd)
                # child.set('activated', 'false')
            elif i.template == 'INSTRUMENTPART'and i.instrumentPart != 'TOOLSHAFT':# and o.toolFunction not in ['GRASP', 'CLAMP']:
                OglShd = ET.Element("OglShader", fileVertexShaders = "['shaders/TIPSShaders/instrument.glsl']" , fileFragmentShaders = "['shaders/TIPSShaders/instrument.glsl']", printLog="1");
                child.append(OglShd)
            child.append(exportVisual(i, opt, name = name + '-visual', with_transform = True))
            child.append(ET.Element("RigidMapping", input="@../../instrumentState", output="@"+name+"-visual", index= idx))
            t.append(child)

    return t

def exportDeformableGrid(o,opt,l):
    if o not in l:
        return
    name = fixName(o.name)
    name_obj = name + ".obj"
    t = ET.Element("Node", name = name)
    if o.local_gravity:
        t.append(ET.Element('Gravity', gravity = o.local_gravity))
    topotetra = name + '-topology'
    if not o.grid_dimension:
        o.grid_dimension = "1 1 1"
    t.append(ET.Element('SparseGridRamificationTopology', n = o.grid_dimension, name= name+"-grid", fileTopology="mesh/TIPS/"+name_obj, nbVirtualFinerLevels = "3", finestConnectivity="0"))
    t.append(ET.Element('MechanicalObject', name= name+"-dofs", scale="1", dy="0", position='@' + name + '-grid.position', tags="NoPicking"))
    if opt.scene.versionSOFA == "18":
        t.append(ET.Element("UniformMass", vertexMass = o.totalMass))
    else:
        t.append(ET.Element("UniformMass", mass = o.totalMass))
    if o.materialType == "ELASTIC":
        h = ET.Element("HexahedronFEMForceField",method="large",updateStiffnessMatrix="false")
        addElasticityParameters(o,h)
    # elif o.materialType == "PLASTIC":
    #     h = ET.Element("HexahedralFEMForceField",method=o.displacementMethod, preserveElementVolume="true")
    #     addElasticityParameters(o,h)
    #     addPlasticityParameters(o,h)
    elif o.materialType == "PLASTIC":
        if o.plasticityMethods == "SOFA":
            h = ET.Element("TetrahedronFEMForceField",method=o.displacementMethod)
            addElasticityParameters(o,h)
            addPlasticityParameters(o,h)
        elif o.plasticityMethods == "ConstantCenter":
            h = ET.Element("HexahedralFEMForceField",method=o.displacementMethod, preserveElementVolume="true")
            addElasticityParameters(o,h)
            addPlasticityParameters(o,h)
        elif o.plasticityMethods == "PhongVertex":
            h = ET.Element("HexahedralFEMForceField",method=o.displacementMethod, useVertexPlasticity="true")
            addElasticityParameters(o,h)
            addPlasticityParameters(o,h)
        elif o.plasticityMethods == "TrilinearVertexVolumeMethod1":
            h = ET.Element("HexahedralFEMForceField",method=o.displacementMethod, useVertexPlasticity="true", preserveElementVolume="true", debugPlasticMethod="0")
            addElasticityParameters(o,h)
            addPlasticityParameters(o,h)
        elif o.plasticityMethods == "TrilinearVertexVolumeMethod2":
            h = ET.Element("HexahedralFEMForceField",method=o.displacementMethod, useVertexPlasticity="true", preserveElementVolume="true", debugPlasticMethod="1")
            addElasticityParameters(o,h)
            addPlasticityParameters(o,h)
        elif o.plasticityMethods == "TrilinearVertexVolumeMethod3":
            h = ET.Element("HexahedralFEMForceField",method=o.displacementMethod, useVertexPlasticity="true", preserveElementVolume="true", debugPlasticMethod="2")
            addElasticityParameters(o,h)
            addPlasticityParameters(o,h)
        else:
            self.report({'ERROR'}, "Methods not implemented...")
    t.append(h)
    if o.damping > 0:
        dmp = ET.Element("DiagonalVelocityDampingForceField", template="Vec3d",  dampingCoefficient="0.05 0.05 0.05 0.05 0.05 0.05")
        t.append(dmp)
    addConstraintCorrection(o, t)
    addConstraints(o, t)

    if o.alternativeCollision:
        n = ET.Element('Node', name="Collision")
        collisionObject = opt.scene.objects[o.alternativeCollision]
        n.append(exportTriangularTopologyContainer(collisionObject,opt))
        n.append(ET.Element('EdgeSetTopologyModifier'))
        moc = createMechanicalObject(o)
        moc.set('name', 'MOC')
        n.append(moc)
        n.extend(collisionModelParts(o, opt))
        n.append(ET.Element("BarycentricMapping",input="@../"+name+"-dofs",output="@MOC"))
        t.append(n)
    else:#if not alternativeCollision:
        n = ET.Element('Node', name="Collision")
        n.append(ET.Element('MeshObjLoader', filename = 'mesh/TIPS/' + name_obj, name="loader"))
        n.append(ET.Element('MechanicalObject', src = '@loader', name="CollisModel"))
        n.append(ET.Element('TriangleSetTopologyContainer', src = '@loader'))
        n.extend(collisionModelParts(o, opt))
        n.append(ET.Element("BarycentricMapping", input="@..", output="@."))
        t.append(n)
    v = ET.Element('Node', name="Visual")
    if o.texture2d != '':
        tex = "textures/"+o.texture2d
    else:
        tex = "textures/board.png"
    v.append(ET.Element('MeshObjLoader', filename = 'mesh/TIPS/' + name_obj, name="visualloader"))
    if o.useShader:
        if not o.shaderFile:
            oglshd = ET.Element("OglShader", fileVertexShaders = "['shaders/TIPSShaders/organShader.glsl']", fileFragmentShaders = "['shaders/TIPSShaders/organShader.glsl']", printLog="1");
            v.append(oglshd)
            v.append(ET.Element("OglModel", name="Visual", texturename = tex, src="@visualloader"))
        elif o.useTessellation:
            oglshd = ET.Element("OglShader", fileVertexShaders = o.shaderFile, fileTessellationControlShaders = o.shaderFile,
                fileTessellationEvaluationShaders = o.shaderFile, fileFragmentShaders = o.shaderFile, printLog="1");
            ogltesslvl = ET.Element("OglFloatVariable", name="TessellationLevel", value = "6")
            v.append(oglshd)
            v.append(ogltesslvl)
            v.append(ET.Element("OglModel", name="Visual", texturename = tex, src="@visualloader", primitiveType = "PATCHES"))
        elif not o.useTessellation:
            oglshd = ET.Element("OglShader", fileVertexShaders = o.shaderFile, fileFragmentShaders = o.shaderFile, printLog="1");
            v.append(oglshd)
            v.append(ET.Element("OglModel", name="Visual", texturename = tex, src="@visualloader"))
    else:
        v.append(ET.Element("OglModel", texturename = tex, name="Visual", src="@visualloader"))
    v.append(ET.Element("BarycentricMapping", input="@..", output="@Visual"))
    t.append(v)
    return t


def exportCloth(o, opt, l):
    if o not in l:
        return
    name=fixName(o.name)
    t = ET.Element("Node",name=name)
    t.set('author-parent', 'SolverNode')
    t.set('author-order', 1)

    # Toploogy
    t.append(exportTriangularTopologyContainer(o,opt))
    #t.append(ET.Element("TriangleSetTopologyModifier", removeIsolated = "false"))
    #t.append(ET.Element("TriangleSetTopologyAlgorithms"))
    t.append(ET.Element("TriangleSetGeometryAlgorithms"))

    # Mechanical Object
    t.append(createMechanicalObject(o))
    t.append(ET.Element("DiagonalMass"))

    # Force fields
    tfff=ET.Element("TriangularFEMForceField", method="large", rayleighStiffness="0.1" )
    tfff.set("youngModulus", o.youngModulus)
    tfff.set("poissonRatio", o.poissonRatio)
    t.append(tfff)
    if o.damping:
        dampstr = str(o.damping)+' '+str(o.damping)+' '+str(o.damping)+' '+str(o.damping)+' '+str(o.damping)+' '+str(o.damping)
        t.append(ET.Element("DiagonalVelocityDampingForceField", template="Vec3d",  dampingCoefficient= dampstr))
    t.append(ET.Element("TriangularBendingSprings",
        stiffness= o.bendingStiffness, damping="1.0"))

    # Collision and Constraints
    addConstraints(o,t)
    # addConstraintCorrection(o, t)
    t.append(ET.Element('UncoupledConstraintCorrection')) # compliance="10"?
    t.extend(collisionModelParts(o, opt, False, o.collisionGroup, 1))

    # Visual
    ogl = ET.Element("OglModel", name= name + '-visual');
    addMaterial(o, ogl);
    t.append(ogl)
    t.append(ET.Element("IdentityMapping",template="Vec3d,ExtVec3d",input="@MO",output='@' + name + "-visual"))
    return t

def pointInsideSphere(v,s,f):
    center = s.location
    radius = max(s.scale)
    distance = (v - center).length
    if (distance < radius * f):
        return True
    else:
        return False

def verticesInsideSphere(o, m, s, factor = 1):
    vindex = []
    for v in m.vertices:
        if pointInsideSphere(o.matrix_world@vec_safe(v.co), s, factor):
            vindex.append(v.index)
    return vindex

def exportAttachConstraint(o, opt):
    amf1 = o.alwaysMatchForObject1
    amf2 = o.alwaysMatchForObject2
    stiffness = o.attachStiffness
    ratio = o.naturalLength
    o1, o2 = opt.scene.objects[o.object1], opt.scene.objects[o.object2]
    # m1, m2 = o1.to_mesh(opt.scene, True, 'PREVIEW'), o2.to_mesh(opt.scene, True, 'PREVIEW')
    m1, m2 = o1.to_mesh(), o2.to_mesh()
    v1, v2 = verticesInsideSphere(o1, m1, o), verticesInsideSphere(o2, m2, o)

    # Find points inside sphere by enlarging the sphere gradually
    f = 1
    while amf1 and len(v1) == 0 and f < 1000:
        f *= 1.404
        v1 = verticesInsideSphere(o1, m1, o, f)

    f = 1
    while amf2 and len(v2) == 0 and f < 1000:
        f *= 1.404
        v2 = verticesInsideSphere(o2, m2, o, f)


    # Find the matching vertex pairs, the tuples are:
    #    (index_from_first_object, index_from_second_object, distance_between_two_points)
    vertexPairs = []
    for i in v1:
        mindist = 1E+38
        minindex = -1
        for j in v2:
            dist = ratio * (vec_safe(o1.matrix_world@m1.vertices[i].co) - vec_safe(o2.matrix_world@m2.vertices[j].co)).length
            if dist < mindist :
                minindex = j
                mindist = dist
        if minindex != -1:
            vertexPairs.append((i,minindex, mindist))

    # Create the springs between the vertex pairs
    springs = [ vector_to_string([i, j, stiffness, .1, d]) for (i,j,d) in vertexPairs ]

    ff = ET.Element("StiffSpringForceField", object1='@' + fixName(o1.name), object2='@' + fixName(o2.name), spring = ' '.join(springs))
    #ff.set('author-parent', 'SolverNode')
    #ff.set('author-order', 100)
    o1.to_mesh_clear()
    o2.to_mesh_clear()
    return ff

def exportTriangularTopologyContainer(o,opt):
    t = ET.Element("TriangleSetTopologyContainer")
    addTriangularTopology(o, t, opt)
    return geometryNode(opt, t)

def addTriangularTopology(o, t, opt):
    # First triangulate the mesh
    # m = o.to_mesh(opt.scene, True, 'PREVIEW')
    m = o.to_mesh()
    bm = bmesh.new()
    bm.from_mesh(m)
    r = bmesh.ops.triangulate(bm, faces = bm.faces)
    triangles = r['faces']

    # Then create position, edge and tri arrays
    position = np.empty([len(bm.verts), 3],dtype=float)
    for i, v in enumerate(bm.verts):
        position[i] = vec_safe(v.co)
    edges = np.empty([len(bm.edges), 2],dtype=int)
    for i, e in enumerate(bm.edges):
        edges[i] = [ v.index for v in e.verts ]
    tri = np.empty([len(triangles), 3],dtype=int)
    for i, f in enumerate(triangles):
        tri[i] = [ v.index for v in f.verts ]
    bm.free()

    t.set("position", position)
    t.set("edges", edges)
    t.set("triangles", tri)
    o.to_mesh_clear()
    return t

def addElasticityParameters(o, t):
    t.set("youngModulus", o.youngModulus)
    t.set("poissonRatio", o.poissonRatio)
    t.set("rayleighStiffness", o.rayleighStiffness)
    if t.tag != "HexahedronFEMForceField":
        t.set("damping", o.damping)
    return t

def addPlasticityParameters(o, t):
    t.set("plasticYieldThreshold", o.plasticYieldThreshold)
    t.set("plasticMaxThreshold", o.plasticMaxThreshold)
    t.set("plasticCreep", o.plasticCreep)
    return t

# default oglShader config
def addShadertoVisual(o,v):
    if o.useShader:
        if not o.shaderFile:
            print("no default shader for obstacle exists!")
        elif not o.useTessellation:
            oglshd = ET.Element("OglShader", fileVertexShaders = o.shaderFile, fileFragmentShaders = o.shaderFile, printLog="1");
            v.append(oglshd);
        else:
            oglshd = ET.Element("OglShader", fileVertexShaders = o.shaderFile, fileTessellationControlShaders = o.shaderFile,
            fileTessellationEvaluationShaders = o.shaderFile, fileFragmentShaders = o.shaderFile, printLog="1");
            ogltesslvl = ET.Element("OglFloatVariable", name="TessellationLevel", value = "4")
            v.append(oglshd)
            v.append(ogltesslvl)
    return v


def exportObstacle(o, opt, l):
    name=fixName(o.name)
    t = ET.Element("Node",name=name)
    t.set('author-parent', 'root')
    t.set('author-order', 1)
    addShadertoVisual(o,t)
    t.append(exportVisual(o, opt, l, name = name+'-visual', with_transform = True))
    # t.append(exportTriangularTopologyContainer(o,opt))
    t.append(exportTriangularTopology(o,opt))
    t.append(createMechanicalObject(o))
    t.extend(collisionModelParts(o, opt, obstacle = True))
    t.append(ET.Element('UncoupledConstraintCorrection'))
    return t

# Note: currently the Rigid type only works with meshObjLoader
def exportRigid(o, opt, l):
    if o not in l:
        return
    name=fixName(o.name)
    t = ET.Element("Node",name=name)
    t.set('author-parent', 'SolverNode')
    t.set('author-order', 1)

    if o.local_gravity:
        t.append(ET.Element('Gravity', gravity = o.local_gravity))
    name = fixName(o.name)
    name_obj = name + ".obj"
    t.append(ET.Element('MeshObjLoader', filename = 'mesh/TIPS/' + name_obj, name="loader"))
    t.append(ET.Element('MeshTopology', src="@loader"))
    t.append(ET.Element('MechanicalObject', src="@loader", name="MO", template="Rigid3d"))
    ogl = ET.Element('OglModel', src="@loader", name=name + "-visual")
    addMaterial(o, ogl);
    t.append(ogl)
    addShadertoVisual(o,t)
    if o.totalMass:
        t.append(ET.Element("UniformMass", totalMass = o.totalMass, template="Rigid3d"))
    if o.damping:
        dampstr = str(o.damping)+' '+str(o.damping)+' '+str(o.damping)+' '+str(o.damping)+' '+str(o.damping)+' '+str(o.damping)
        t.append(ET.Element("DiagonalVelocityDampingForceField", template="Rigid3d",  dampingCoefficient= dampstr))
    t.append(ET.Element("RigidMapping",template='Rigid3d,Vec3d',input="@MO",output='@' + name + "-visual"))
    col = ET.Element("Node", name="Collision")
    col.append(ET.Element("MechanicalObject", name="CollisModel", src="@../loader"))
    col.append(ET.Element("TriangleSetTopologyContainer", src="@../loader"))
    col.extend(collisionModelParts(o,opt, obstacle = False))
    col.append(ET.Element("RigidMapping",template='Rigid3d,Vec3d',input="@..",output="@."))
    t.append(col)
    t.append(ET.Element('UncoupledConstraintCorrection'))
    return t

def exportTriangularTopology(o,opt):
    t = ET.Element("MeshTopology",name=fixName(o.name) + '-topology')
    addTriangularTopology(o,t,opt)
    return geometryNode(opt, t)

def fixName(name):
    return name.replace(".","_")

def mult_color(col, m):
    return (col[0]*m, col[1]*m, col[2]*m)

def fix_color(rgb):
    def linear(c):
        a = .055
        if c <= .0031308:
            return 12.92 * c
        else:
            return (1+a) * c**(1/2.4) - a
    return tuple(linear(c) for c in rgb)

def addMaterialToBicubic(o, t):
    m = o.data
    if len(m.materials) >= 1 :
        mat = m.materials[0]

        a = mat.alpha # alpha should go at the end of each color
        t.set('diffuseColor', mat.diffuse_color*mat.diffuse_intensity)
        t.set('ambientIntensity', mat.ambient)
        t.set('specularColor', mat.specular_color*mat.specular_intensity)
        t.set('shininess', mat.specular_hardness)
        #t.set('emit', mat.diffuse_color*mat.emit)

        #if len(mat.texture_slots) >= 1 and mat.texture_slots[0] != None :
        #    tex = mat.texture_slots[0].texture
        #    if tex.type == 'IMAGE' :
        #        t.set("texturename", bpy.path.abspath(tex.image.filepath))


def addMaterial(o, t):
    m = o.data
    if len(m.materials) >= 1 :
        text = ""
        if m.materials[0].use_nodes:
            mat = m.materials[0].node_tree.nodes["Material Output"].inputs["Surface"].links[0].from_node.inputs

            # diffuse_intensity, ambient, emit, alpha, specular_hardness
            d_val = Vector((0.8, 0.8, 0.8))
            d_val = mat["Base Color"].default_value
            s_val = mat["Specular"].default_value
            if type(mat["Specular"]) is bpy.types.NodeSocketFloatFactor:
                s_val = (d_val[0], d_val[1], d_val[2], s_val)
                try:
                    s_val = Vector(mult_color((1.0,1.0,1.0), 1.0 - mat["Specular Tint"].default_value)) + Vector(mult_color(d_val, mat["Specular Tint"].default_value))
                    s_val = mult_color(s_val, mat["Specular"].default_value)
                    s_val = (s_val[0], s_val[1], s_val[2], 1.0)
                except KeyError as e:
                    pass
            try:
                e_val = mat["Emissive Color"].default_value
            except KeyError as e:
                try:
                    e_val = mat["Emission"].default_value
                except KeyError as e2:
                    e_val = Vector((0.0, 0.0, 0.0))
            ss = mat["Roughness"].default_value
            try:
                tr = 1.0 - mat["Transparency"].default_value
            except KeyError as e:
                try:
                    tr = 1.0 - mat["Alpha"].default_value
                except KeyError as e2:
                    tr = 0.0

            d = mult_color(fix_color(d_val[0:4]),d_val[3])
            d = vector_to_string(Vector((d[0], d[1], d[2], 1.0)))
            a = vector_to_string(mult_color(fix_color(d_val[0:4]),1.0-d_val[3]))
            s = vector_to_string(fix_color(s_val[0:4]))
            e = vector_to_string(fix_color(e_val[0:4]))

            text = "Default Diffuse 1 %s %s Ambient 1 %s 1 Specular 1 %s 1 Emissive 1 %s 1 Shininess 1 %d " % (d,tr,a,s,e,ss)
        else:
            mat = m.materials[0]

            d_val = list(mat.diffuse_color)
            s_val = list(mat.specular_color)
            ss = (mat.roughness * mat.specular_intensity)/2
            tr = 1.0

            d = vector_to_string(mult_color(fix_color(d_val[0:4]),d_val[3]))
            a = vector_to_string(mult_color(fix_color(d_val[0:4]),1.0-d_val[3]))
            s = vector_to_string(mult_color(fix_color(s_val[0:4]),mat.specular_intensity))
            e = vector_to_string((0.0, 0.0, 0.0, 1.0))

            text = "Default Diffuse 1 %s %s Ambient 1 %s 1 Specular 1 %s 1 Emissive 1 %s 1 Shininess 1 %d " % (d,tr,a,s,e,ss)

        t.set("material", text)

    if o.texture2d != '':
        t.set("texturename", "textures/"+o.texture2d)
    if o.texture3d != '':
        t.set("texturename", "textures/"+o.texture3d)
        t.set("genTex3d", '1')

def exportVisual(o, opt, l, name = None,with_transform = True):
    if o not in l:
        return

    m = o.to_mesh()
    if o.useShader and o.useTessellation:
        t = ET.Element("OglModel",name=name or fixName(o.name), primitiveType = "PATCHES" )
    else:
        t = ET.Element("OglModel",name=name or fixName(o.name))

    if with_transform :
        t.set("translation", (o.location))
        t.set("rotation", (rotation_to_XYZ_euler(o)))
        t.set("scale3d", (o.scale))

    position = np.empty([len(m.vertices),3],dtype=float)
    for i,v in enumerate(m.vertices):
        position[i] = vec_safe(v.co)

    t.set("position", position)
    normal   = np.empty([len(m.vertices),3],dtype=float)
    for i,v in enumerate(m.vertices):
        normal[i] = v.normal

    t.set("normal", normal)

    triangles = []
    quads = []

    for f in m.polygons:
        if len(f.vertices) == 3:
            triangles.append([f.vertices[0], f.vertices[1], f.vertices[2]])
        elif len(f.vertices) == 4:
            quads.append([f.vertices[0], f.vertices[1], f.vertices[2], f.vertices[3]])

    if len(triangles) > 0:
        t.set("triangles", triangles)
    if len(quads) > 0:
        t.set("quads", quads)

    if len(m.uv_layers) >= 1:
        try:
            if type(m.uv_layers[0].data[0].uv) == type(5.0):
                uvl = m.uv_layers[0].data
                ## allocate a mapping between vertex indices and loop indices
                mapping = array('I',[ 0 for i in range(0,len(m.vertices)) ])
                for l in m.loops: mapping[l.vertex_index] = l.index
                texcoords = [ (uvl[mapping[i]].uv) for i in range(0,len(m.vertices))]
                t.set("texcoords", texcoords)
        except IndexError:
            pass

    addMaterial(o, t)
    o.to_mesh_clear()
    return geometryNode(opt, t)


def exportObject(opt, o, l):
    t = None
    if not o.hide_render:
        annotated_type = o.template
        name = fixName(o.name)
        if o.type == 'MESH' or o.type == 'SURFACE' or o.type == 'CURVE':
            if annotated_type == 'COLLISION' or annotated_type == 'SAFETYSURFACE':
                #print(o.name + annotated_type)
                t = exportObstacle(o, opt, l)
            elif annotated_type == 'CLOTH':
                t = exportCloth(o, opt, l)
            elif annotated_type == 'VOLUMETRIC':
                if o.type == 'MESH' and hasattr(o.data,'tetrahedra') and len(o.data.tetrahedra) > 0:
                    t = exportVolumetric(o, opt, l)
                elif o.type == 'MESH' and hasattr(o.data,'hexahedra') and len(o.data.hexahedra) > 0:
                    t = exportHexVolumetric(o, opt, l)
                else:
                    raise ExportException("Volumetric mesh expected: '%s'" % o.name)
            elif annotated_type == 'DEFORMABLE':
                t = exportDeformableGrid(o, opt, l)
            elif annotated_type == 'THICKSHELL':
                t = exportThickQuadShell(o, opt, l)
            elif annotated_type == 'THICKCURVE':
                t = exportThickCurve(o, opt, l)
            elif annotated_type == 'VISUAL':
                # if(o.useShader and o.shaderFile)
                # oglshd = ET.Element("OglShader", fileVertexShaders = o.shaderFile, fileTessellationControlShaders = o.shaderFile,
                # fileTessellationEvaluationShaders = o.shaderFile, fileFragmentShaders = o.shaderFile, printLog="1");
                # ogltesslvl = ET.Element("OglFloatVariable", name="TessellationLevel", value = "8")
                t = exportVisual(o, opt, l, with_transform = True)
            elif annotated_type == 'RIGID':
                t = exportRigid(o, opt, l)
        elif o.type == 'LIGHT':
            if o.data.type == 'SPOT':
                t = ET.Element("SpotLight", name=fixName(o.name))
                o.rotation_mode = "QUATERNION"
                t.set("position", (o.location))
                col = list(o.data.color)
                col.append(1.0)
                t.set("color", (col))
                direction = o.rotation_quaternion @ Vector((0,0,-1))
                t.set("direction",(direction))
                t.set("exponent", 0.5)
                t.set("cutoff", (o.data.spot_size)*(180/math.pi))
            elif o.data.type == 'POINT':
                t = ET.Element("PositionalLight", name=fixName(o.name))
                t.set("position", (o.location))
                col = list(o.data.color)
                col.append(1.0)
                t.set("color", (col))
    return t


def addConnectionsBetween(t, o, q, opt):
    if not opt.pluginAddedCT:
        t.append(ET.Element("RequiredPlugin", name = "SurfLabConnectingTissue"))
        opt.pluginAddedCT = True
    if o.attachStiffness < 1000000:
        t.append(ET.Element("ConnectingTissue", object1='@' + fixName(o.name), object2='@' + fixName(q.name),useConstraint=o.useBilateralConstraint, threshold=o.attachThreshold, thresholdTearing=o.naturalLength*10000, connectingStiffness=o.attachStiffness, naturalLength=o.naturalLength))
# =======
#     # t.append(ET.Element("RequiredPlugin", name = "SurfLabConnectingTissue"))
#     if o.attachStiffness < 1000000 and o.tearingThreshold > 1:
#       t.append(ET.Element("ConnectingTissue", object1='@' + fixName(o.name), object2='@' + fixName(q.name),useConstraint=o.useBilateralConstraint, threshold=o.attachThreshold, connectingStiffness=o.attachStiffness, naturalLength=o.naturalLength, thresholdTearing=o.tearingThreshold))
# >>>>>>> origin/debugPlasticity
    else:
        t.append(ET.Element("ConnectingTissue", object1='@' + fixName(o.name), object2='@' + fixName(q.name),useConstraint=o.useBilateralConstraint, threshold=o.attachThreshold, thresholdTearing=o.naturalLength*10000, connectingStiffness=10000000000, naturalLength=o.naturalLength))

def addConnectionsToTissue(t, o, opt):
    if o.object1 in opt.scene.objects and not opt.scene.objects[o.object1].hide_render:
        addConnectionsBetween(t, o, opt.scene.objects[o.object1], opt)
    if o.object2 in opt.scene.objects and not opt.scene.objects[o.object2].hide_render:
        addConnectionsBetween(t, o, opt.scene.objects[o.object2], opt)


def exportHaptic(l, opt):
    scene = opt.scene
    #return []

    hapticDevices = opt.pref.hapticDevices
    # If there are no haptic devices, then haptic is not enabled
    if len(hapticDevices) == 0:
        return []

    nodes = []
    instruments = []
    instrumentsWithCamera = []

    # Stuff at the root that are needed for a haptic scene
    if opt.scene.versionSOFA == "18":
        nodes.append(ET.Element("RequiredPlugin", pluginName="SofaMiscCollision"))
    #nodes.append(ET.Element("RequiredPlugin", pluginName="Sensable"))
    nodes.append(ET.Element("RequiredPlugin", pluginName="SurfLabHapticDevice"))
    nodes.append(ET.Element("RequiredPlugin", pluginName="SurfLabHaptic"))
    nodes.append(ET.Element("RequiredPlugin", pluginName="SofaOpenglVisual"))
    nodes.append(ET.Element("RequiredPlugin", pluginName="SofaHaptics"))
    nodes.append(ET.Element("RequiredPlugin", pluginName="SofaPython"))
    nodes.append(ET.Element("RequiredPlugin", pluginName = "SurfLabConnectingTissue"))

    # nodes.append(ET.Element("LuaController", source = "changeInstrumentController.lua", listening=1))
    # replace Salua by SofaPython Plugin
    nodes.append(ET.Element("PythonScriptController", filename = "changeInstrumentController.py", classname="ChangeInstrumentController", listening=1))

    useEndoscope = opt.scene.enableEndoscope
    useSuture = opt.scene.enableSutureController
    if useEndoscope:
        nodes.append(ET.Element("PythonScriptController", filename = "endoscopeController.py", classname="EndoscopeController", listening=1))
    if useSuture:
        nodes.append(ET.Element("PythonScriptController", filename = "sutureController.py", classname="SutureController", listening=1))

    # Prepare the instruments in the order of layers, they are included in each haptic
    for layer in range(16): # check layers 0 ~ 15
        objs = [o for o in l if o.layers[layer]]
        layer = layer+1

        for o in objs:
            # if o == endoscope  exportEndoscope(o, opt)
            if not o.hide_render and o.template == 'INSTRUMENT' and o.toolFunction != 'CAMERA':
                instruments.append(objectNode(opt, exportInstrument(o, opt, l)))
                instrumentsWithCamera.append(objectNode(opt, exportInstrument(o, opt, l)))
            elif o.template == 'INSTRUMENT' and o.toolFunction == 'CAMERA':
                # instrumentsWithCamera.append(objectNode(opt, exportInstrument(o, opt)))
                instrumentsWithCamera.insert(0,objectNode(opt, exportInstrument(o, opt)))
    # for o in l:
        # if not o.hide_render and o.template == 'INSTRUMENT' and o.name != scene.defaultInstrument:
            # instruments.append(objectNode(opt, exportInstrument(o, opt)))

    if scene.hapticWorkspaceBox in scene.objects:
        b = scene.objects[scene.hapticWorkspaceBox]
        positionBase = b.location
        orientationBase = rotation_to_quaternion(b)
        scaleBase = pow(b.scale[0] * b.scale[1] * b.scale[2], 1./3)

    else:
        positionBase = [0, 0, 0]
        orientationBase = [0, 0, 0, 1]
        scaleBase = 1
    if scene.hapticMoveTo:
        moveTo = scene.objects[scene.hapticMoveTo].location
    else:
        moveTo = positionBase

    for hp in hapticDevices:
        n = hp.deviceName
        t = ET.Element("Node", name = hp.deviceName, tags='haptic')
        omniTag = n + "__omni"

        ## Omni driver wrapper
        rl = ET.Element("Node", name="RigidLayer")
        if scene.precompution: # precompute is unstable now
            rl.append(ET.Element("SurfLabHapticDevice",
                               name = 'driver',
                               deviceName = hp.deviceName,
                               tags= omniTag, scale = hp.scale * scaleBase , positionBase = positionBase, orientationBase = orientationBase, desirePosition = moveTo,
                               permanent="true", listening="true", alignOmniWithCamera=scene.alignOmniWithCamera,
                               forceScale = 1));
        else:
            hapticDriverNode = ET.Element("SurfLabHapticDevice",

                                 name = 'driver',
                                 deviceName = hp.deviceName,
                                 tags= omniTag, scale = hp.scale * scaleBase , positionBase = positionBase, orientationBase = orientationBase, desirePosition = moveTo,
                                 permanent="true", listening="true", alignOmniWithCamera=scene.alignOmniWithCamera,
                                 forceScale = hp.forceScale);
            if hp.enableAndroidController:
                hapticDriverNode.set("enableUDPServer", "true")
                hapticDriverNode.set("inServerIPAddr", hp.serverIPAddr)
                hapticDriverNode.set("inServerPortNum", hp.serverPortNum)
                # hapticDriverNode.set("orientationBase", "0.0 0.0 0.0 1.0")
                # hapticDriverNode.set("alignOmniWithCamera","true")
            rl.append(hapticDriverNode);
        rl.append(ET.Element("MechanicalObject", name="ToolRealPosition", tags=omniTag, template="Rigid3d", position="0 0 0 0 0 0 1",free_position="0 0 0 0 0 0 1"))
        nt = ET.Element("Node",name = "Tool");
        nt.append(ET.Element("MechanicalObject", template="Rigid3d", name="RealPosition"))
        nt.append(ET.Element("SubsetMapping", indices="0"));
        rl.append(nt);
        t.append(rl)

        # State of the tool
        isn = ET.Element("Node",name = "Instruments_of_"+n);
        isn.append(ET.Element("Gravity", gravity="0 0 0"))
        isn.append(ET.Element("EulerImplicitSolver", rayleighMass="0.0", rayleighStiffness="0.0"))
        isn.append(ET.Element("CGLinearSolver",iterations="100", tolerance="1.0e-10", threshold="1.0e-10"))
        isn.append(ET.Element("MechanicalObject", name = "instrumentState", template="Rigid3d", position="0 0 0 0 0 0 1 0 0 0 0 0 0 1 0 0 0 0 0 0 1 0 0 0 0 0 0 1 0 0 0 0 0 0 1 0 0 0 0 0 0 1", free_position="0 0 0 0 0 0 1 0 0 0 0 0 0 1 0 0 0 0 0 0 1 0 0 0 0 0 0 1 0 0 0 0 0 0 1 0 0 0 0 0 0 1" ))
        if scene.precompution:
            isn.append(ET.Element("UniformMass", template = "Rigid3d,RigidMass<3,double>", name="mass", totalMass="0.3"))
            isn.append(ET.Element("LCPForceFeedback", activate=hp.forceFeedback, tags=omniTag, forceCoef="0.02"))
        else:
            if opt.scene.versionSOFA == "18":
                isn.append(ET.Element("UniformMass", template = "Rigid3d,RigidMass<3,double>", name="mass", totalMass="15.0"))
            else:
                isn.append(ET.Element("UniformMass", template = "Rigid3d,RigidMass<3,double>", name="mass", totalmass="15.0"))
            isn.append(ET.Element("LCPForceFeedback", activate=hp.forceFeedback, tags=omniTag, forceCoef="0.25"))
        if hp.deviceName == "PHANToM 2":
            isn.extend(instrumentsWithCamera)
        else:
            isn.extend(instruments)
        if opt.scene.versionSOFA == "18":
            isn.append(ET.Element("RestShapeSpringsForceField", template="Rigid3d",stiffness="1e12",angularStiffness="1e12", external_rest_shape="@../RigidLayer/ToolRealPosition", points = "0"))
        else:
            isn.append(ET.Element("RestShapeSpringsForceField", template="Rigid3d",stiffness="1e12",angularStiffness="1e12", external_rest_shape="../RigidLayer/ToolRealPosition", points = "0"))
        isn.append(ET.Element("UncoupledConstraintCorrection"))
        t.append(isn)

        nodes.append(objectNode(opt, t))

    return nodes

def objectNode(opt, t):
    if t != None and opt.separate:
        return exportSeparateFile(opt, t, t.get('name'))
    else:
        return t


def fovOfCamera(c):
    """Calculate field of view in degrees from focal length of a lens,
    assuming the standard film size"""
    correction = 717 / 1024.0
    return 2 * math.atan(c.sensor_width / (2 * c.lens)) * 180 / math.pi * correction


def exportCamera(o, opt):
    fov = fovOfCamera(o.data)
    position=o.location
    orientation=rotation_to_quaternion(o)
    lookAt = o.matrix_world @ Vector((0,0,-1))
    return ET.Element("InteractiveCamera", name="InteractiveCamera", position=position, orientation=orientation, fieldOfView=fov, distance=1, listening="false")

def get_obj_family(obj):    # get object and its children
    objs = set()
    def add_obj(obj):
        objs.add(obj)
        for child in obj.children:
            add_obj(child)
    add_obj(obj)
    return objs

def remove_others(objs):    # remove objects not contained in objs
    scene = bpy.context.scene
    for obj in scene.objects:
        if obj not in objs:
            scene.collection.objects.unlink(obj)
            try:
                bpy.data.objects.remove(obj)
            except RuntimeError: # non-zero users
                pass
    scene.update()

def prepare_name(opt, name):
    chars_to_replace = [ '.','/',':','*','?','"','<','>','|' ]
    for c in chars_to_replace:
        name = name.replace(c, '_')
    return  os.path.join(opt.directory, name + ".blend")

def export2Blend(opt, l):
    names = [ o.name for o in l ]   # object names in scene as obj pointers are to be nullified in remove_others
    for name in names:
        obj = bpy.data.objects[name]
        if not obj.hide_render:
            bpy.ops.ed.undo_push(message="Delete others")           # set a restore point
            objs = get_obj_family(obj)                              # get object and its children
            remove_others(objs)                                     # remove other objects
            path = prepare_name(opt, name)                          # get file name
            opt.filepath_list.append(path)                          # add this blend file path to the list of exported files
            bpy.ops.wm.save_as_mainfile(filepath=path, copy=True,)  # save .blend file
            bpy.ops.ed.undo()                                       # restore deleted objects

def zipExportedFiles(opt):
    os.chdir(opt.directory)
    top_archive = zipfile.ZipFile(os.path.splitext(basename(opt.filepath))[0]+".zip", mode='w')

    uniq_path_prfx = list(set([os.path.splitext(fp)[0] for fp in opt.filepath_list]))
    filepath_list_nested = [ [ fp for fp in opt.filepath_list if fp.startswith(upp) ] for upp in uniq_path_prfx ]

    for i, prfx in enumerate(uniq_path_prfx):   # put all related files into one zip
        if len(filepath_list_nested[i]) > 1:
            sub_archive = zipfile.ZipFile(prfx + ".zip", mode='w')
            for fname in filepath_list_nested[i]:
                sub_archive.write(fname,basename(fname))
                os.remove(fname)
            sub_archive.close()

    for i, fpl in enumerate(filepath_list_nested):  # put all isolated files and zips (from above) into a top-level zip
        if len(fpl) == 1:   # isolated file
            top_archive.write(fpl[0],basename(fpl[0]))
            os.remove(fpl[0])
        else:   # newly generated zip
            fpath = uniq_path_prfx[i]+".zip"
            top_archive.write(fpath,basename(fpath))
            os.remove(fpath)
    top_archive.close()

def exportScene(opt):
    scene = opt.scene
    selection = opt.selection_only
    separate = opt.separate
    dir = opt.directory

    root= ET.Element("Node")
    root.set("name", "root")
    root.set("gravity",[0,0,0])
    # if scene.use_gravity :
        # root.set("gravity",scene.gravity)
    # else:
        # root.set("gravity",[0,0,0])
    root.set("dt",0.01)

    root.append(ET.Element("RequiredPlugin", pluginName="SofaMiscCollision"))
    root.append(ET.Element("RequiredPlugin", pluginName="SofaOpenglVisual"))
    root.append(ET.Element('VisualStyle', displayFlags='hideVisual showBehaviorModels showForceFields'));

    #lcp = ET.Element("LCPConstraintSolver", tolerance="1e-6", maxIt = "1000", mu = scene.mu, '1e-6'))
    lcp = ET.Element("GenericConstraintSolver", tolerance="1e-6", maxIterations = "10000")
    root.append(lcp)

    root.append(ET.Element('FreeMotionAnimationLoop'))
    root.append(ET.Element("DefaultPipeline", depth="6", name="CollisionPipeline"))
    root.append(ET.Element("BruteForceDetection", name="N2"))
    root.append(ET.Element("LocalMinDistance", angleCone = "0.0", alarmDistance=scene.alarmDistance,contactDistance=scene.contactDistance))
    root.append(ET.Element("DefaultCollisionGroupManager"))
    root.append(ET.Element('DefaultContactManager', response="FrictionContact", name="CollisionResponse"))

    solverNode = ET.Element("Node", name="SolverNode")
    addSolvers(solverNode)

    root.append(ET.Element("LightManager"))
    if scene.showXYZFrame:
        root.append(ET.Element("OglSceneFrame"))
    if scene.useSpeechRecognition:
        root.append(ET.Element('RequiredPlugin', name='SurfLabSpeechRecognition'));
        root.append(ET.Element('SpeechToText'));

    if selection:
        l = list(bpy.context.selected_objects)
    else:
        l = list(scene.objects)
    l.reverse()
    root.extend(exportHaptic(l, opt))

    for o in l:
        t = objectNode(opt, exportObject(opt, o, l))
        if t != None:
            if o.template and o.template == 'SAFETYSURFACE':
                root.append(t)
            else:
                solverNode.append(t)
    for o in l:
        if not o.hide_render and (o.object1 != '' or o.object2 != ''):
            addConnectionsToTissue(solverNode, o, opt)
        if not o.hide_render and o.template == 'ATTACHCONSTRAINT':
            solverNode.append( objectNode(opt, exportAttachConstraint(o, opt)) )

    if scene.enableSutureController:
        sutureNode = ET.Element("Node", name="SutureNode", sleeping="true")
        sutureNode.append(ET.Element("AttachConstraint", name="sutureConstraint", object1="@fundus_old", object2="@fundus_old", twoWay="true", indices1="49", indices2="61", constraintFactor="1" ))
        solverNode.append(sutureNode)
    root.append(solverNode)

    # To make sure the python sript 'endoscopeController.py' works properly,
    # interactive Camera needs to be placed at the end of the scene
    if scene.camera is not None:
        root.append(exportCamera(scene.camera, opt))

    return root

class ExportOptions:
    pass

def writeNodesToFile(root, filepath, opt):
    if opt.file_format == '.salua':
        writeElementTreeToLua(root, filepath)
    else:
        stringify_etree(root)
        ET.ElementTree(root).write(filepath)


class ExportToSofa(Operator, ExportHelper):
    """Export to SOFA scene"""
    bl_idname = "export.tosofa"
    bl_label = "Export To SOFA"

    filename_ext: EnumProperty(
            name ='File format', description='File format of the SOFA scene file to be created',
            items = FILEFORMATS, default='.scn' )

    filter_glob: StringProperty(
            default='*.scn;*.salua',
            options={'HIDDEN'},
            )

    use_selection: BoolProperty(
            name="Selection Only",
            description="Export Selected Objects Only",
            default=False,
            )

    export_separate: BoolProperty(
            name="Isolate objects into separate files",
            description="Export Objects into Separate Files and Include all in one *.scn File",
            default=False,
            )

    isolate_geometry: BoolProperty(
            name="Isolate geometry into separate files",
            description="Put each geometry components of objects into separate files",
            default=False,
            )
    export_to_zip: BoolProperty(
            name="Prepare a TIPS-author bundle (.zip)",
            description="Export Isolated Objects into *.zip File",
            default=False,
            )

    @classmethod
    def poll(cls, context):
        return context.scene is not None

    def execute(self, context):
        self.report({'INFO'}, "Exporting to %s" % self.filepath)
        try:
            opt = ExportOptions()
            opt.isolate_geometry = self.isolate_geometry
            opt.export_to_zip = self.export_to_zip
            opt.scene = context.scene
            opt.separate = True if opt.export_to_zip else self.export_separate
            opt.selection_only = self.use_selection
            opt.directory = os.path.dirname(self.filepath)
            opt.filepath = self.filepath
            opt.filepath_list = []
            #adds the self.filepath that is the scene filepath
            opt.filepath_list.append(self.filepath)
            opt.file_format = self.filename_ext
            opt.pref = context.preferences.addons[__package__].preferences
            root = exportScene(opt)

            writeNodesToFile(root, self.filepath, opt)

            # export objects in separate .blend files ATTN: opt.scene might be affected after this code is ran.
            if opt.separate:
                if opt.selection_only: l = list(bpy.context.selected_objects)
                else:                  l = list(opt.scene.objects)
                l.reverse()
                export2Blend(opt, l)

            if opt.export_to_zip:
                zipExportedFiles(opt)

            return {'FINISHED'}
        except ExportException as et:
            self.report({'ERROR'}, "Export failed: %s" % et.message)
            return { 'CANCELLED' }

def menu_func_export(self, context):
    self.layout.operator(ExportToSofa.bl_idname, text="SOFA Scene (.scn)")

def register_other():
    #bpy.utils.register_class(ExportToSofa)
    bpy.types.TOPBAR_MT_file_export.append(menu_func_export)

def unregister_other():
    #bpy.utils.unregister_class(ExportToSofa)
    bpy.types.TOPBAR_MT_file_export.remove(menu_func_export)

def register():
    register_other()
    bpy.utils.register_module(__name__)

def unregister():
    unregister_other()
    bpy.utils.unregister_module(__name__)
